*Heading
** Job name: faisal Model name: faisal
** Generated by: Abaqus/CAE 2024
*Preprint, echo=NO, model=NO, history=NO, contact=NO
**
** PARTS
**
*Part, name=faisal_Part
*Node
      1,           1.,           1.,           1.
      2,           1.,          0.5,           1.
      3,           1.,           0.,           1.
      4,           1.,           1.,          0.5
      5,           1.,          0.5,          0.5
      6,           1.,           0.,          0.5
      7,           1.,           1.,           0.
      8,           1.,          0.5,           0.
      9,           1.,           0.,           0.
     10,          0.5,           1.,           1.
     11,          0.5,          0.5,           1.
     12,          0.5,           0.,           1.
     13,          0.5,           1.,          0.5
     14,          0.5,          0.5,          0.5
     15,          0.5,           0.,          0.5
     16,          0.5,           1.,           0.
     17,          0.5,          0.5,           0.
     18,          0.5,           0.,           0.
     19,           0.,           1.,           1.
     20,           0.,          0.5,           1.
     21,           0.,           0.,           1.
     22,           0.,           1.,          0.5
     23,           0.,          0.5,          0.5
     24,           0.,           0.,          0.5
     25,           0.,           1.,           0.
     26,           0.,          0.5,           0.
     27,           0.,           0.,           0.
*Element, type=C3D8RT
1, 10, 11, 14, 13,  1,  2,  5,  4
2, 11, 12, 15, 14,  2,  3,  6,  5
3, 13, 14, 17, 16,  4,  5,  8,  7
4, 14, 15, 18, 17,  5,  6,  9,  8
5, 19, 20, 23, 22, 10, 11, 14, 13
6, 20, 21, 24, 23, 11, 12, 15, 14
7, 22, 23, 26, 25, 13, 14, 17, 16
8, 23, 24, 27, 26, 14, 15, 18, 17
*Nset, nset=_PickedSet2, internal, generate
  1,  27,   1
*Elset, elset=_PickedSet2, internal, generate
 1,  8,  1
** Section: faisal_Section
*Solid Section, elset=_PickedSet2, material=smp-10
,
*End Part
**
**
** ASSEMBLY
**
*Assembly, name=Assembly
**
*Instance, name=faisal_Instance, part=faisal_Part
*End Instance
**
*Nset, nset=ALLNODESSET, instance=faisal_Instance, generate
  1,  27,   1
*Nset, nset=_PickedSet3, internal, instance=faisal_Instance, generate
 19,  27,   1
*Elset, elset=_PickedSet3, internal, instance=faisal_Instance, generate
 5,  8,  1
*Nset, nset=_PickedSet4, internal, instance=faisal_Instance, generate
 1,  9,  1
*Elset, elset=_PickedSet4, internal, instance=faisal_Instance, generate
 1,  4,  1
*End Assembly
*Amplitude, name=faisal_DisplacementAmp
             0.,             20.,          13800.,            250.,          21000.,            250.,          34800.,             20.
**
** MATERIALS
**
*Material, name=smp-10
*Conductivity
 0.5,
*Density
 1.2e-09,
*Depvar
     30,
*Elastic
2500., 0.35
*Specific Heat
1000.,
**
** BOUNDARY CONDITIONS
**
** Name: faisal_FixedFace Type: Displacement/Rotation
*Boundary
_PickedSet3, 1, 1
_PickedSet3, 3, 3
** ----------------------------------------------------------------
**
** STEP: faisal_Displacement_Step
**
*Step, name=faisal_Displacement_Step, nlgeom=NO, inc=1000000
faisal_Apply controlled displacement in this step
*Coupled Temperature-displacement, creep=none, deltmx=10.
60., 34800., 1e-06, 34800.
*Solution Technique, type=SEPARATED
*CONTROLS, PARAMETERS=FIELD, FIELD=GLOBAL
1e-02, 1e-02, 1e-02, 2e-02, 1e-04, 1e-04, 1e-03, 1e-08
1., 1e-05, 1e-08
*CONTROLS, PARAMETERS=TIME INCREMENTATION
50,50,9,80,80,80,12,80,6,3,50,50,6
*CONTROLS, PARAMETERS=LINE SEARCH
10
**
** BOUNDARY CONDITIONS
**
** Name: TempBC Type: Temperature
*Boundary, amplitude=faisal_DisplacementAmp
ALLNODESSET, 11, 11, 20.
** Name: faisal_DisplacementEdge Type: Displacement/Rotation
*Boundary, amplitude=faisal_DisplacementAmp
_PickedSet4, 1, 1, 0.1
**
** OUTPUT REQUESTS
**
*Restart, write, frequency=0
**
** FIELD OUTPUT: faisal_field_output_requests
**
*Output, field
*Node Output
RF, U
*Element Output, directions=YES
E, S
**
** HISTORY OUTPUT: Custom_History_Outputs
**
*Output, history, variable=PRESELECT
*End Step
