*Heading
 twenty_seven_Single element test
** Job name: twenty_seven_Job Model name: twenty_seven
** Generated by: Abaqus/CAE 2024
*Preprint, echo=NO, model=NO, history=NO, contact=NO
**
** PARTS
**
*Part, name=twenty_seven_Part
*Node
      1,           1.,           1.,           1.
      2,           1.,  0.666666687,           1.
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*Element, type=C3D8RT
 1, 17, 18, 22, 21,  1,  2,  6,  5
 2, 18, 19, 23, 22,  2,  3,  7,  6
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*Nset, nset=_PickedSet2, internal, generate
  1,  64,   1
*Elset, elset=_PickedSet2, internal, generate
  1,  27,   1
** Section: twenty_seven_Section
*Solid Section, elset=_PickedSet2, material=smp-10
,
*End Part
**
**
** ASSEMBLY
**
*Assembly, name=Assembly
**
*Instance, name=twenty_seven_Instance, part=twenty_seven_Part
*End Instance
**
*Nset, nset=ALLNODESSET, instance=twenty_seven_Instance, generate
  1,  64,   1
*Nset, nset=_PickedSet3, internal, instance=twenty_seven_Instance, generate
 49,  64,   1
*Elset, elset=_PickedSet3, internal, instance=twenty_seven_Instance, generate
 19,  27,   1
*Nset, nset=_PickedSet4, internal, instance=twenty_seven_Instance, generate
  1,  16,   1
*Elset, elset=_PickedSet4, internal, instance=twenty_seven_Instance, generate
 1,  9,  1
*End Assembly
*Amplitude, name=twenty_seven_DisplacementAmp
             0.,             20.,          13800.,            250.,          21000.,            250.,          34800.,             20.
**
** MATERIALS
**
*Material, name=smp-10
*Conductivity
 0.5,
*Density
 1.2e-09,
*Depvar
     30,
*Elastic
2500., 0.35
*Specific Heat
1000.,
**
** BOUNDARY CONDITIONS
**
** Name: twenty_seven_FixedFace Type: Displacement/Rotation
*Boundary
_PickedSet3, 1, 1
_PickedSet3, 3, 3
** ----------------------------------------------------------------
**
** STEP: twenty_seven_Displacement_Step
**
*Step, name=twenty_seven_Displacement_Step, nlgeom=NO, inc=1000000
twenty_seven_Apply controlled displacement in this step
*Coupled Temperature-displacement, creep=none, deltmx=10.
60., 34800., 1e-06, 34800.
**
** BOUNDARY CONDITIONS
**
** Name: TempBC Type: Temperature
*Boundary, amplitude=twenty_seven_DisplacementAmp
ALLNODESSET, 11, 11, 20.
** Name: twenty_seven_DisplacementEdge Type: Displacement/Rotation
*Boundary, amplitude=twenty_seven_DisplacementAmp
_PickedSet4, 1, 1, 0.1
**
** OUTPUT REQUESTS
**
*Restart, write, frequency=0
**
** FIELD OUTPUT: twenty_seven_field_output_requests
**
*Output, field
*Node Output
RF, U
*Element Output, directions=YES
E, S
**
** HISTORY OUTPUT: Default History Outputs
**
*Output, history, variable=PRESELECT
*End Step
